finish
/clear

/NOPR
/title,passive suspension
!!!
!!!GEOMETRY PROPERTIES
!!!
g = 1          ! air gap
w = 20         ! electrode width
!!!
!!!MESH PROPERTIES
!!!
elnum = 2
!!!
!!!PROBLEM PROPERTIES
!!!
V_amp = 100     ! Voltage amplitude
V_freq = 50     ! Voltage frequency
resistivivty = 2
inductivity = 4
!!!

/prep7
!ELEMENT ID 1 ELECTRIC
et,1,223,1001,,,1        ! "elastic air" brick
mp,ex,1,1.e-3            ! MPa
mp,prxy,1,0.0
mp,perx,1,1

emunit,EPZRO,8.854e-6    ! pF/um
!ELEMENT ID 1.. CIRCU
ET,101,CIRCU94,0,,,,,1     ! RESISTOR
ET,102,CIRCU94,1,,,,,1     ! INDUCTOR
ET,103,CIRCU94,4,1,,,,1   ! VOLTAGE SOURCE, Sinusoidal load
ET,999,200           ! wire
!!!!
R,101,resistivivty   ! RESISTOR
R,102,inductivity    ! INDUCTOR
R,103,0,V_amp,V_freq
!!!
!!!Model
!!!
BLC4, 0,0,w,g
LSEL,s,,,2
LSEL,a,,,4
LESIZE,all,,,elnum
LSEL,s,,,1
LSEL,a,,,3
LESIZE,all,,,elnum*w/g
!Meshing bricks
type,1
mat,1
amap,1,1,2,3,4
nsel,s,loc,y,0
cp,1,VOLT,all    ! bottom coupling
nsel,s,loc,y,g
cp,2,VOLT,all    ! top coupling
alls
!Circuit defining
N1 = NODE(0,0,0)
N2 = NODE(0,g,0)
N,10001,-1,0,0
N,10002,-1,g,0
N,10003,-0.5,-1,0
type,103
real,103
E,N1,10001,10003
type,101
real,101
E,10001,10002
type,102
real,102
E,10002,N2
!!!
!!! Apply DOF
!!!
nsel,all
nsel,s,loc,y,0
nsel,a,loc,y,g
nsel,r,loc,x,0,w
d,all,ux,0.0
d,all,uy,0.0
!
/solu
ANTYPE,TRANS                  ! TRANSIENT ANALYSIS
OUTRES,ALL,ALL
cnvtol,f,1,1e-3
deltim,10              ! 10 Volt solution interval
outres,nsol,1
neqit,50
nlgeom,on
time,1000               ! Time = voltage
kbc,0                  ! ramped loading
solve
fini
! /solu
! anty,static
! outres,all,all
! solve
! finish


! ndisp=node(0,0,0)    ! node for displacement display
! /POST26
! nsol,2,ndisp,u,y
! /axlab,y,UY
! /axlab,x,Voltage
! prvar,2
! plvar,2
! fini

/POST1
nsel,s,loc,y,0
FSUM
! /POST1
! !*
/EFACET,1
PLNSOL, VOLT,, 0 !el potential
! /EFACET,1    !
! ! PLNSOL, EF,SUM, 0 !el field
! ! /EFACET,1
! ! PLNSOL, JC,SUM, 0  !current density
fini
